# OpenSim document version 40600
ScaleTool FullBodyScaled:
  mass: 62 [kg]
  height: 1620
  age: 33
  GenericModelMaker:
    model_file: C:\Users\tomas\Documents\OpenSim\4.5\Models\Rajagopal_OpenSense\Russell_model_athletes\Russell_markers_March3.osim
    marker_set_file: G:\My Drive\Documents\AI_and_math_physics\Sessions_vicon\March3\vicon_data_1_3-5-2026\X01.trc
  ModelScaler:
    apply: true
    scaling_order: measurements manualScale
    marker_file: G:\My Drive\Documents\AI_and_math_physics\Sessions_vicon\March3\vicon_data_1_3-5-2026\X01.trc
    time_range: 1 20
    preserve_mass_distribution: true
    output_model_file: Russell_ModelScaled_API.osim
    output_scale_file: Russell_ModelScaled_API.txt
    MeasurementSet:
      Measurement femur_r_y: apply=true
        MarkerPair: markers=(RAsis RKneeMedial)
        MarkerPair: markers=(RAsis RKneeLateral)
        BodyScale femur_r: axes=Y
      Measurement femur_l_y: apply=true
        MarkerPair: markers=(LAsis LKneeMedial)
        MarkerPair: markers=(LAsis LKneeLateral)
        BodyScale femur_l: axes=Y
      Measurement tibia_r_y: apply=true
        MarkerPair: markers=(RKneeLateral RAnkleLateral)
        BodyScale tibia_r: axes=Y
      Measurement tibia_l_y: apply=true
        MarkerPair: markers=(LKneeLateral LAnkleLateral)
        BodyScale tibia_l: axes=Y
      Measurement foot_r_x: apply=true
        MarkerPair: markers=(RHeel RToes)
        BodyScale talus_r: axes=X
        BodyScale calcn_r: axes=X
        BodyScale toes_r: axes=X
      Measurement foot_l_x: apply=true
        MarkerPair: markers=(LHeel LToes)
        BodyScale talus_l: axes=X
        BodyScale calcn_l: axes=X
        BodyScale toes_l: axes=X
      Measurement torso_z: apply=true
        MarkerPair: markers=(RShoulder LShoulder)
        BodyScale torso: axes=Z
      Measurement torso_x: apply=true
        MarkerPair: markers=(Xiphoid Thoracic)
        BodyScale torso: axes=X
      Measurement pelvis_z: apply=true
        MarkerPair: markers=(RAsis LAsis)
        MarkerPair: markers=(LPsis RPsis)
        BodyScale pelvis: axes=Z
      Measurement pelvis_x: apply=true
        MarkerPair: markers=(RAsis RPsis)
        MarkerPair: markers=(LAsis LPsis)
        BodyScale pelvis: axes=X
      Measurement femur_l_z: apply=true
        MarkerPair: markers=(LKneeLateral LKneeMedial)
        BodyScale femur_l: axes=Z
      Measurement femur_r_z: apply=true
        MarkerPair: markers=(RKneeLateral RKneeMedial)
        BodyScale femur_r: axes=Z
      Measurement foot_r_z: apply=true
        MarkerPair: markers=(RToeMedial RToeLateral)
        BodyScale talus_r: axes=Z
        BodyScale calcn_r: axes=Z
        BodyScale toes_r: axes=Z
      Measurement foot_l_z: apply=true
        MarkerPair: markers=(LToeMedial LToeLateral)
        BodyScale talus_l: axes=Z
        BodyScale calcn_l: axes=Z
        BodyScale toes_l: axes=Z
      Measurement tibia_l_z: apply=true
        MarkerPair: markers=(LAnkleLateral LAnkleMedial)
        BodyScale tibia_l: axes=Z
      Measurement tibia_r_z: apply=true
        MarkerPair: markers=(RAnkleLateral RankleMedial)
        BodyScale tibia_r: axes=Z
      Measurement torso_y: apply=true
        MarkerPair: markers=(Sacral Neck)
        BodyScale torso: axes=Y
  MarkerPlacer:
    apply: false
    marker_file: G:\My Drive\Documents\AI_and_math_physics\Sessions_vicon\March3\vicon_data_1_3-5-2026\X01.trc
    time_range: 0 5.8
    output_model_file: Deniz_March3.osim
    max_marker_movement: -1
    IKTaskSet:
      IKMarkerTask pelvis_left: apply=true weight=1
      IKMarkerTask pelvis_right: apply=true weight=1
      IKMarkerTask pelvis_top: apply=true weight=1
      IKMarkerTask torso_left: apply=true weight=1
      IKMarkerTask torso_right: apply=true weight=1
      IKMarkerTask torso_bottom: apply=true weight=1
      IKMarkerTask neck_left: apply=true weight=1
      IKMarkerTask neck_right: apply=true weight=1
      IKMarkerTask neck_middle: apply=true weight=1
      IKMarkerTask neck_top: apply=true weight=1
      IKMarkerTask clavicle1_from_left: apply=true weight=1
      IKMarkerTask clavicle2: apply=true weight=1
      IKMarkerTask clavicle3: apply=true weight=1
      IKMarkerTask clavicle4: apply=true weight=1
      IKMarkerTask scapula_left: apply=true weight=1
      IKMarkerTask scapula_right: apply=true weight=1
      IKMarkerTask scapula_top: apply=true weight=1
      IKMarkerTask humerus1: apply=true weight=1
      IKMarkerTask humerus_set_back: apply=true weight=1
      IKMarkerTask humerus_set_front: apply=true weight=1
      IKMarkerTask humerus_set_bottom: apply=true weight=1
      IKMarkerTask humerus_inner_elbow: apply=true weight=1
      IKMarkerTask elbow_front: apply=true weight=1
      IKMarkerTask forearm_ms_back: apply=true weight=1
      IKMarkerTask forearm_ms_front: apply=true weight=1
      IKMarkerTask forearm_ms_down: apply=true weight=1
      IKMarkerTask forearm_wrist_thumb: apply=true weight=1
      IKMarkerTask forearm_wrist_pinky: apply=true weight=1
      IKMarkerTask forearm_wrist_inside: apply=true weight=1
      IKMarkerTask hand_thumb: apply=true weight=1
      IKMarkerTask hand_index: apply=true weight=1
      IKMarkerTask hand_pinky: apply=true weight=1
      # Keep coordinate tasks only if these coordinates actually exist in your Russell model
      IKCoordinateTask lumbar_extension: apply=false weight=100 value_type=default_value value=0
      IKCoordinateTask lumbar_bending: apply=false weight=1 value_type=default_value value=0
